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A := [2, 0, -1; 4, -3, 2]
B := [7, -5, 1; 1, -4, -3]
C := [1, 2; -2, 1]
D := [3, 5; -1, 4]
E := [-5; 3]
(1)
-2*A = [-4, 0, 2; -8, 6, -4]
B - 2*A = [3, -5, 3; -7, 2, -7]
A*C =  # error: These array dimensions do not match.
C*D = [1, 13; -7, -6]
# 2x3*2x2 --> A rows and C columns dont match
(2)
A + 2*B = [16, -10, 1; 6, -11, -4]
3*C - E =  # error
C*B = [9, -13, -5; -13, 6, -5]
E*B =  # error
# 2x2*2x1 --> needs to be same dimentions for subtraction | 2x1*2x3 --> E columns and B rows dont match
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A := [3, -6; -4, 8]
B := [8, 6; 5, 7]
C := [6, -2; 4, 3]
AB := A*B = [-6, -24; 8, 32]
AC := A*C = [-6, -24; 8, 32]
AB == AC explicit, AB, AC → [-6, -24; 8, 32] == [-6, -24; 8, 32] = 1
A ≠ C explicit, A, C → [3, -6; -4, 8] ≠ [6, -2; 4, 3]
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(47)
(48)
