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# Create a cubic spline
# three intervals of speed
i_1 := [0 s, 3.1 s]
i_2 := [3.1 s, 10.3 s]
i_3 := [10.3 s, 30.1 s]
0*s ≤ t ≤ 3.1*s
v(t) := [
    a_1(t - 0 s)^3 + a_2(t - 0 s)^2 + a_3(t - 0 s) + a_4;
    b_1(t - 3.1 s)^3 + b_2(t - 3.1 s)^2*b_3(t - 3.1 s) + b_4;
    c_1(t - 10.3 s)^3 + c_2(t - 10.3 s)^2 + c_3(t - 10.3 s) + c_4
]  # error: This variable is undefined. Check that the label is set correctly.
3.1*s ≤ t ≤ 10.3*s
10.3*s ≤ t ≤ 30.1*s
v(0*s) == 0*mph
v(3.1*s) == 30*mph
v(10.3*s) == 60*mph
v(30.1*s) == 90*mph
v(3.1 s) → [
    a_4 + a_3(3.1*s) + a_1(3.1*s)^3 + a_2(3.1*s)^2;
    b_4 + b_2(-3.1*s + 3.1*s)^2*b_3(-3.1*s + 3.1*s) + b_1(-3.1*s + 3.1*s)^3;
    c_4 + c_3(3.1*s - 10.3*s) + c_1(3.1*s - 10.3*s)^3 + c_2(3.1*s - 10.3*s)^2
]
a_4 := 0
b_4 := 30
c_4 := 60
