(1.7)
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eq := [1, 7, 3, -4; 0, 1, -1, 3; 0, 0, 0, 1; 0, 0, 1, -2]
# Nothing to continue. The set is inconsistent -> no solution
(1.11)
1*x_1 + 3*x_2 + 3*x_3 == -2
eq := [0, 1, 4, -4; 1, 3, 3, -2; 3, 7, 5, 6]
x_2 + 4*x_3 == -4
eq := [1, 3, 3, -2; 0, 1, 4, -4; 3, 7, 5, 6]
3*x_1 + 7*x_2 + 5*x_3 == 6
eq[2, :] := eq[2, :] + (eq[0, :]*(-3))
eq = [1, 3, 3, -2; 0, 1, 4, -4; 0, -2, -4, 12]
eq[2, :] := eq[2, :] + (eq[1, :]*2)
eq = [1, 3, 3, -2; 0, 1, 4, -4; 0, 0, 4, 4]
eq[2, :] := eq[2, :]/4
eq = [1, 3, 3, -2; 0, 1, 4, -4; 0, 0, 1, 1]
eq[1, :] := eq[1, :] + (eq[2, :]*(-4))
eq = [1, 3, 3, -2; 0, 1, 0, -8; 0, 0, 1, 1]
eq[0, :] := eq[0, :] + (eq[1, :]*(-3))
eq = [1, 0, 3, 22; 0, 1, 0, -8; 0, 0, 1, 1]
eq[0, :] := eq[0, :] + (eq[2, :]*(-3))
eq = [1, 0, 0, 19; 0, 1, 0, -8; 0, 0, 1, 1]
[0, 1, 4; 1, 3, 3; 3, 7, 5]*[19; -8; 1] = [-4; -2; 6]
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clear(x_1, x_2, x_3)
eq := [1, h, 4; 3, 6, 8]
eq[1, :] := eq[1, :] + (eq[0, :]*(-3))  # error: These units are not compatible.
eq → [1, h, 4; 0, 6 - 3*h, -4]  # h!=2
# 27. (T/F) Every elementary row operation is reversible.
# True
#
# 28. (T/F) Elementary row operations on an augmented matrix never change the solution set of the associated linear system.
# True
#
# 29. (T/F) A 5x6 matrix has six rows.
# False - rows come first
#
# 30. (T/F) Two matrices are row equivalent if they have the same number of rows.
# False
#
# 31. (T/F) The solution set of a linear system involving variables x1; : : : ; xn is a list of numbers .s1; : : : ; sn/ that makes each equation in the system a true statement when the values s1; : : : ; sn are substituted for x1; : : : ; xn, respectively.
# false - The description given applies to a single solution. The solution set consists of all possible solutions. Only in special cases does the solution set consist of exactly one solution. Mark a statement True only if the statement is always true.
#
# 32. (T/F) An inconsistent system has more than one solution.
# False
#
# 33. (T/F) Two fundamental questions about a linear system involve existence and uniqueness.
# true
#
# 34. (T/F) Two linear systems are equivalent if they have the same solution set.
# True
