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(1)
# reduced echelon form: a, b, c
#
# echelon form: d
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(7)
eq := [1, 2, 3, 4; 4, 8, 9, 4]
eq[1, :] := eq[1, :] + (eq[0, :]*(-4))
eq → [1, 2, 3, 4; 0, 0, -3, -12]
eq[1, :] := eq[1, :]/(-3)
eq → [1, 2, 3, 4; 0, 0, 1, 4]
eq[0, :] := eq[0, :] + (eq[1, :]*(-3))
eq → [1, 2, 0, -8; 0, 0, 1, 4]
(9)
eq := [0, 1, -6, 5; 1, -2, 7, -4]
eq := [1, -2, 7, -4; 0, 1, -6, 5]
x_1 - 5*x_3 == 6 solve, x_1 → 5*x_3 + 6
eq[0, :] := eq[0, :] + (eq[1, :]*2)
eq → [1, 0, -5, 6; 0, 1, -6, 5]
x_2 - 6*x_3 == 5 solve, x_2 → 6*x_3 + 5
[x_1; x_2; x_3] == x3*[5; 6; 1] + [6; 5; 0]
(11)
eq := [3, -4, 2, 0; -9, 12, -6, 0; -6, 8, -4, 0]
eq[0, :] := eq[0, :]/3
eq → [1, -4/3, 2/3, 0; -9, 12, -6, 0; -6, 8, -4, 0]
eq[1, :] := eq[1, :] + (eq[0, :]*9)
eq → [1, -4/3, 2/3, 0; 0, 0, 0, 0; -6, 8, -4, 0]
eq[2, :] := eq[2, :] + (eq[0, :]*6)
eq → [1, -4/3, 2/3, 0; 0, 0, 0, 0; 0, 0, 0, 0]
(35 - 38)
# 35. Suppose a 3x5 coefficient matrix for a system has three pivot columns. Is the system consistent? Why or why not?
#
# one cannot know. a pivot in the solution column would result in inconsistent
#
# 36. Suppose a system of linear equations has a 3  5 augmented matrix whose fifth column is a pivot column. Is the system consistent? Why (or why not)?
#
# no. same reason
#
# 37. Suppose the coefficient matrix of a system of linear equations has a pivot position in every row. Explain why the system is consistent.
#
# with only pivot rows in an coeffient matrix at least one solution exists
#
# 38. Suppose the coefficient matrix of a linear system of three equations in three variables has a pivot in each column. Explain why the system has a unique solution
#
# when all colums in a coefficient matrix are pivot colums, the solution is unique
(45)
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A := [1, 1*1, 1*1^2; 1, 1*2, 1*2^2; 1, 1*3, 1*3^2]
B := [11; 16; 19]
lsolve(A, B) → [4; 8; -1]
