(1)
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u := [-1; 2]
v := [-3; 3]
u + v = [-4; 5]
u - 2*v = [5; -4]
(5)
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x_1*[4; -3; 2] + x_2*[-8; 7; 0] == [9; -6; -5] → [4*x_1 - 8*x_2; 7*x_2 - 3*x_1; 2*x_1] == [9; -6; -5]
(11)
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a_1 := [1; -2; 0]
a_2 := [0; 1; 2]
a_3 := [5; -6; 8]
b := [2; -1; 6]
eq := a_1*x_1 + a_2*x_2 + a_3*x_3 == b  # error: This variable is undefined. Check that the label is set correctly.
eq → [x_1 + 5*x_3; x_2 - 2*x_1 - 6*x_3; 2*x_2 + 8*x_3] == [2; -1; 6]
eq := [1, 0, 5, 2; -2, 1, -6, -1; 0, 2, 8, 6]
eq[1, :] := eq[1, :] + (eq[0, :]*2)
eq → [1, 0, 5, 2; 0, 1, 4, 3; 0, 2, 8, 6]
eq[2, :] := eq[2, :] + (eq[1, :]*(-2))
eq → [1, 0, 5, 2; 0, 1, 4, 3; 0, 0, 0, 0]
# Since eq has at least one solution -> b is a linear combination of a1, a2 and a3
(17)
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a_1 := [1; 4; -2]
a_2 := [-2; -3; 7]
b := [4; 1; h]
a_1*x_1 + a_2*x_2 == b → [x_1 - 2*x_2; 4*x_1 - 3*x_2; 7*x_2 - 2*x_1] == [4; 1; h]
eq := [1, -2, 4; 4, -3, 1; -2, 7, h]
eq[1, :] := eq[1, :] + (eq[0, :]*(-4))
eq → [1, -2, 4; 0, 5, -15; -2, 7, h]
eq[1, :] := eq[1, :]/5
eq → [1, -2, 4; 0, 1, -3; -2, 7, h]
eq[2, :] := eq[2, :] + (eq[0, :]*2)  # error: These units are not compatible.
eq → [1, -2, 4; 0, 1, -3; 0, 3, h + 8]
eq[2, :] := eq[2, :] + (eq[1, :]*(-3))  # error: This array index is invalid. The index must be an integer, not less than ORIGIN, and not greater than the last element.
eq → [1, -2, 4; 0, 1, -3; 0, 0, h + 17]
0 == h + 17 solve, h → -17
(23 - 32)
(33)
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a_1 := [1; 0; -2]
a_2 := [0; 3; 6]
a_3 := [-4; -2; 3]
b := [4; 1; -4]
(a)
# A consists of 3 vectors - same as colums in W
(b)
eq := [1, 0, -4, 4; 0, 3, -2, 1; -2, 6, 3, -4]
rref(eq) → [1, 0, 0, -4; 0, 1, 0, -1; 0, 0, 1, -2]
[a_1; a_2; a_3] == [-4; -1; -2]
# b is in W, W consists of 3 vectors
(c)
# a1 is in W, because all 3 vectors are used to create the plane
