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(1)
# Matrix product is not defined here. A needs to be a 3x3 matrix
[-4, 2; 1, 6; 0, 1]*[3; 1; 7]
(2)
# [2; 6; -1]*[1; -1] | same deal. A needs to be 3x2
(3)
Ax == [6, 5; -4, -3; 7, 6]*[1; -3] == 1*[6; -4; 7] + (-3*[5; -3; 6])
1*[6; -4; 7] + (-3*[5; -3; 6]) = [-9; 5; -11]
Ax == [6, 5; -4, -3; 7, 6]*[1; -3] == [6*1 + 5*(-3); -4*1 + (-3*(-3)); 7*1 + 6*(-3)]
[6*1 + 5*(-3); -4*1 + (-3*(-3)); 7*1 + 6*(-3)] = [-9; 5; -11]
(4)
Ax == [8, 3, 1; 5, 1, 2]*[1; 1; 1] == 1*[8; 5] + 1*[3; 1] + 1*[1; 2]
1*[8; 5] + 1*[3; 1] + 1*[1; 2] = [12; 8]
Ax == [8, 3, 1; 5, 1, 2]*[1; 1; 1] == [8*1 + 3*1 + 1*1; 5*1 + 1*1 + 2*1]
[8*1 + 3*1 + 1*1; 5*1 + 1*1 + 2*1] = [12; 8]
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(9)
[4, 1, -7; 0, 1, 6]*[x_1; x_2; x_3] == [8; 0]
x_1*[4; 0] + x_2*[1; 1] + x_3*[-7; 6] == [8; 0]
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(11)
A := [1, 2, 4; 0, 1, 5; -2, -4, -3]
b := [-2; 2; 9]
W := [1, 2, 4, -2; 0, 1, 5, 2; -2, -4, -3, 9]
rref(W) → [1, 0, 0, 0; 0, 1, 0, -3; 0, 0, 1, 1]
x == [x_1; x_2; x_3] == [0; -3; 1]
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# They do not span R4 because it needs a pivot point in all rows. (theorium 4.d)
A := [1, 0, 1; 0, -1, 0; -1, 0, 0; 0, 1, -1]
rref(A) = [1, 0, 0; 0, 1, 0; 0, 0, 1; 0, 0, 0]
# 24. (T/F) Every matrix equation Ax=b corresponds to a vector equation with the same solution set.
# true and false. only if b is in Rm
#
# 25. (T/F) If the equation Ax=b is inconsistent, then b is not in the set spanned by the columns of A.
# true. the equations needs to be consistent, because a pivot point is needed in all rows
#
# 26. (T/F) A vector b is a linear combination of the columns of a matrix A if and only if the equation Ax=b has at least one solution.
# true
#
# 27. (T/F) The equation Ax=b is consistent if the augmented matrix [A b] has a pivot position in every row.
# true
#
# 31. (T/F) If the columns of an mxn matrix A span Rm, then the equation Ax=b is consistent for each b in Rm.
# true
#
# 32. (T/F) The solution set of a linear system whose augmented matrix is [ a1 a2 a3 b ] is the same as the solution set of Ax=b, if A =[ a1 a2 a3 ]
# true
#
# 33. (T/F) If A is an mxn matrix and if the equation Ax=b is inconsistent for some b in Rm, then A cannot have a pivot position in every row.
# true
(35)
c_1 := -4
[3, -4, 2; 6, -3, 4; -8, 9, -5]*[-4; -1; 3] == [-2; -9; 8]
# Ax=b <=> Ac=b
c_2 := -1
c_3 := 3
[-2; -9; 8] == c_1*[3; 6; -8] + c_2*[-4; -3; 9] + c_3*[2; 4; -5] → 1
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(50)
W := [8, 11, -6, -7, 13; -7, -8, 5, 6, -9; 11, 7, -7, -9, -6; -3, 4, 1, 8, 7]
rref(W) = [1, 0, -0.538462, 0, 0; 0, 1, -0.153846, 0, 0; 0, 0, 0, 1, 0; 0, 0, 0, 0, 1]  # No! all rows need a pivot point
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(52)
# no more colums can be deleted, because then a pivot would be missing.
# deleting colum 3  -->
[1, 0, 0, 0; 0, 1, 0, 0; 0, 0, 1, 0; 0, 0, 0, 1]
