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# (1) | trivial solution --> b=0 && x=0 in Ax=b --> A0=0
# nontrivial solution --> b=0 && x!=0 in Ax=b --> Ax=0
2*x_1 - 5*x_2 + 8*x_3 == 0
-2*x_1 - 7*x_2 + x_3 == 0
[2, -5, 8; -2, -7, 1; 4, 7, 1]*[x_1; x_2; x_3] == 0
W := [2, -5, 8, 0; -2, -7, 1, 0; 4, 2, 7, 0]
4*x_1 + 7*x_2 + x_3 == 0
rref(W) = [1, 0, 2.125, 0; 0, 1, -0.75, 0; 0, 0, 0, 0]  # --> x3 is free --> nontrivial solution
(3)
-3*x_1 + 5*x_2 - 7*x_3 == 0
[-3, 5, -7; -6, 7, 1]*[x_1; x_2; x_3] == 0
W := [-3, 5, -7, 0; -6, 7, 1, 0]
-6*x_1 + 7*x_2 + x_3 == 0
rref(W) = [1, 0, -6, 0; 0, 1, -5, 0]  # --> x3 is free --> nontrivial solution
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(5)
x_1 + 3*x_2 + x_3 == 0
-4*x_1 - 9*x_2 + 2*x_3 == 0
W := [1, 3, 1, 0; -4, -9, 2, 0; 0, -3, -6, 0]
rref(W) = [1, 0, -5, 0; 0, 1, 2, 0; 0, 0, 0, 0]
-3*x_2 - 6*x_3 == 0
# x3 is free --> nontrivial solution
x == [x_1; x_2; x_3] == [5*x_3; -2*x_3; x_3] == x_3*[5; -2; 1] == x_3v
v := [5; -2; 1]
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(7)
1*x_1 + 9*x_3 - 8*x_4 == 0 solve, x_1 → 8*x_4 - 9*x_3
W := [1, 3, -3, 7, 0; 0, 1, -4, 5, 0]
rref(W) = [1, 0, 9, -8, 0; 0, 1, -4, 5, 0]
1*x_2 - 4*x_3 + 5*x_4 == 0 solve, x_2 → 4*x_3 - 5*x_4
x == [x_1; x_2; x_3; x_4] == [8*x_4 - 9*x_3; 4*x_3 - 5*x_4; x_3; x_4] == [-9*x_3; 4*x_3; x_3; 0] + [8*x_4; -5*x_4; 0; x_4] == x_3*[-9; 4; 1; 0] + x_4*[8; -5; 0; 1]
# u | v
(11)
W := [1, -4, -2, 0, 3, -5, 0; 0, 0, 1, 0, 0, -1, 0; 0, 0, 0, 0, 1, -4, 0; 0, 0, 0, 0, 0, 0, 0]
rref(W) = [1, -4, 0, 0, 0, 5, 0; 0, 0, 1, 0, 0, -1, 0; 0, 0, 0, 0, 1, -4, 0; 0, 0, 0, 0, 0, 0, 0]
x_1 - 4*x_2 + 5*x_6 == 0 solve, x_1 → 4*x_2 - 5*x_6
x_3 - x_6 == 0 solve, x_3 → x_6
x_5 - 4*x_6 == 0 solve, x_5 → 4*x_6
x == [x_1; x_2; x_3; x_4; x_5; x_6] == [4*x_2 - 5*x_6; x_2; x_6; x_4; 4*x_6; x_6] == [4*x_2; x_2; 0; 0; 0; 0] + [0; 0; 0; x_4; 0; 0] + [-5*x_6; 0; x_6; 0; 4*x_6; x_6] == x_2*[4; 1; 0; 0; 0; 0] + x_4*[0; 0; 0; 1; 0; 0] + x_6*[-5; 0; 1; 0; 4; 1]
# u | v | w
(27 - 28)
(31 - 36)
# t/f questions are waste of time
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(41)
# a: no! there is no free variables. b:yes, there is a pivot point in all columns of A
(42)
# a: yes! there is a free variable, which means 0 is among them. b: no! there is not a pivot point in all columns of A
(43)
# a: no! there is no free variables. b: no, there is not a pivot point in all columns of A
(44)
# a: yes, there is two free variables. b: yes, there is a pivot point in each column
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# x2 is free.
# setting a variable for x_2
W := [-2, -6, 0; 7, 21, 0; -3, -9, 0]
rref(W) = [1, 3, 0; 0, 0, 0; 0, 0, 0]
x_2 := 1
x_1 := x_1 + 3*x_2 == 0 solve, x_1 → -3
A := [-2, -6; 7, 21; -3, -9]
b := [0; 0; 0]
x := [x_1; x_2] → [-3; 1]
A*x == b explicit, A, x_1, x_2, x, b → [-2, -6; 7, 21; -3, -9]*[-3; 1] == [0; 0; 0] → 1
