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(1)
v_1 := [5; 1; 0]
v_2 := [7; 2; -6]
v_3 := [-2; -1; 6]  # vectors are linear independent if the solution is only the trivial one --> x=0 -->v*0=0
# x3 is free --> solution is nontrivial --> they are linearly dependent
W := [5, 7, -2, 0; 1, 2, -1, 0; 0, -6, 6, 0]
rref(W) = [1, 0, 1, 0; 0, 1, -1, 0; 0, 0, 0, 0]
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9*a
v_1 := [1; -3; 2]
v_2 := [-3; 10; -6]
v_3 := [2; -7; h]
eq := [1, -3, 2; -3, 10, -7; 2, -6, h]
eq[1, :] := eq[1, :] + (eq[0, :]*3)
eq → [1, -3, 2; 0, 1, -1; 2, -6, h]
eq[2, :] := eq[2, :] + (eq[0, :]*(-2))  # error: These units are not compatible.
eq → [1, -3, 2; 0, 1, -1; 0, 0, h - 4]
# Equation has a solution when h=4 --> v3 is in span v1, v2 when h = 4
9*b
eq := [1, -3, 2, 0; -3, 10, -7, 0; 2, -6, h, 0]
eq := [1, -3, 2, 0; 0, 1, -1, 0; 0, 0, h - 4, 0]  # error: These units are not compatible.
# Vectors are linearly dependent if the solution is nontrivial --> we need a free variable
# this is satisfied if h=4 --> we dont have a pivot in 3rd column
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(15)
# solution is nontrivial, 2x4 has 2 free variables --> linearly dependent
eq := [5, 2, 1, -1; 1, 8, 3, 7]
(16)
# solution is nontrivial, v2 is 2/3 of v1 --> 1 free variable --> linearly independent
eq := [4, 6; -2, -3; 6, 9]
(17)
# solution is nontrivial, there is no pivot point in column 2 --> 1 free variable --> linearly independent
eq := [3, 0, -6; 5, 0, 5; -1, 0, 4]
(18)
# solution is nontrivial, 2x4 has 2 free variables --> linearly dependent
eq := [4, -1, 2, 8; 4, 3, 5, 1]
(19)
# solution is trivial, no free variables --> linearly independent
eq := [-8, 2; 12, -3; -4, -1]
(20)
# solution is nontrivial, zero vector in 3x3 means 1 free variable --> linearly dependent
eq := [1, -2, 0; 4, 5, 0; -7, 3, 0]
(21 - 28)
# t/f questions are waste of time
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# (29) | (30) | (31)
[1, ⁕, ⁕; 0, 1, ⁕; 0, 0, 1]
[0, 1; 0, 0]
[1, ⁕; 0, 0]
[0, 0; 0, 0]
[1, ⁕; 0, 1; 0, 0; 0, 0]
[0, 1; 0, 0; 0, 0; 0, 0]
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(47)
A := [8, -3, 0, -7, 2; -9, 4, 5, 11, -7; 6, -2, 2, -4, 4; 5, -1, 7, 0, 10]
rref(A) → [1, 0, 3, 1, 0; 0, 1, 8, 5, 0; 0, 0, 0, 0, 1; 0, 0, 0, 0, 0]  # pivot columns are 1, 2 and 5
B := [8, -3, 2; -9, 4, -7; 6, -2, 4; 5, -1, 10]
B*x == 0
eq := [8, -3, 2, 0; -9, 4, -7, 0; 6, -2, 4, 0; 5, -1, 10, 0]
rref(eq) = [1, 0, 0, 0; 0, 1, 0, 0; 0, 0, 1, 0; 0, 0, 0, 0]
