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A := [2, 0, -1; 4, -3, 2]
B := [7, -5, 1; 1, -4, -3]
C := [1, 2; -2, 1]
D := [3, 5; -1, 4]
E := [-5; 3]
(1)
-2*A = [-4, 0, 2; -8, 6, -4]
B - 2*A = [3, -5, 3; -7, 2, -7]
A*C =  # error: These array dimensions do not match.
C*D = [1, 13; -7, -6]
# A*C doesnt work beacause of the matrix sizes. A * C -> 2x3 * 2x2
# The Row size on A and Column size on C is not the same
(2)
A + 2*B = [16, -10, 1; 6, -11, -4]
3*C - E =  # error
C*B = [9, -13, -5; -13, 6, -5]
E*B =  # error
# 3C-E doesnt work because with subraction both matrix need to be same size
# EB doesnt work for the same reason as A*C dont
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A := [3, -6; -4, 8]
B := [8, 6; 5, 7]
C := [6, -2; 4, 3]
AB := A*B = [-6, -24; 8, 32]
AC := A*C = [-6, -24; 8, 32]
AB == AC explicit, AB, AC → [-6, -24; 8, 32] == [-6, -24; 8, 32] = 1
B ≠ C explicit, B, C → [8, 6; 5, 7] ≠ [6, -2; 4, 3] = 1
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QR == [Qr_1 .. Qr_p]  # when
R == [r_1 .. r_p]
Mrot_(M, r) := stack(submatrix(M, ORIGIN + r + 1, ORIGIN + rows(M) - 1, ORIGIN, ORIGIN + cols(M) - 1), submatrix(M, ORIGIN, ORIGIN + r, ORIGIN, ORIGIN + cols(M) - 1))
Mrot(M, r) := if(mod(r, rows(M)) > 0, Mrot_(M, mod(r - 1, rows(M))), if(mod(r, rows(M)) < 0, Mrot_(M, rows(M) + mod(r, rows(M)) - 1), M))
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S := [0, 1, 0, 0, 0; 0, 0, 1, 0, 0; 0, 0, 0, 1, 0; 0, 0, 0, 0, 1; 0, 0, 0, 0, 0]
S^2 = [0, 0, 1, 0, 0; 0, 0, 0, 1, 0; 0, 0, 0, 0, 1; 0, 0, 0, 0, 0; 0, 0, 0, 0, 0]
S^3 = [0, 0, 0, 1, 0; 0, 0, 0, 0, 1; 0, 0, 0, 0, 0; 0, 0, 0, 0, 0; 0, 0, 0, 0, 0]
S^4 = [0, 0, 0, 0, 1; 0, 0, 0, 0, 0; 0, 0, 0, 0, 0; 0, 0, 0, 0, 0; 0, 0, 0, 0, 0]
S^5 = [0, 0, 0, 0, 0; 0, 0, 0, 0, 0; 0, 0, 0, 0, 0; 0, 0, 0, 0, 0; 0, 0, 0, 0, 0]
# S^6 would also yield a zero matrix
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A := [1/6, 1/2, 1/3; 1/2, 1/4, 1/4; 1/3, 1/4, 5/12]
A^5 = [0.331822, 0.334587, 0.333591; 0.334587, 0.332321, 0.333092; 0.333591, 0.333092, 0.333317]
A^10 = [0.333337, 0.33333, 0.333333; 0.33333, 0.333336, 0.333334; 0.333333, 0.333334, 0.333333]
A^20 = [0.333333, 0.333333, 0.333333; 0.333333, 0.333333, 0.333333; 0.333333, 0.333333, 0.333333]
A^30 = [0.333333, 0.333333, 0.333333; 0.333333, 0.333333, 0.333333; 0.333333, 0.333333, 0.333333]
# The higher the power of A, the more precise a value a 1/3 matrix you get
