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(1)
M := [8, 3; 5, 2]
M_inv == 1/(M_a*M_d - M_b*M_c)*[M_d, -M_b; -M_c, M_a]
M_inv == 1/(2*8 - (-3*(-5)))*[2, -3; -5, 8] == 1*[2, -3; -5, 8] == [2, -3; -5, 8]
M^-1 == [2, -3; -5, 8] → 1
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(A^-1)^-1 == A
M_inv := [2, -3; -5, 8]
M_inv_inv == 1/(2*8 - (-3*(-5)))*[8, 3; 5, 2] == 1*[8, 3; 5, 2] == [8, 3; 5, 2]
M_inv^-1 == [8, 3; 5, 2] → 1
(M^-1)^-1 == M → 1
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A := [8, 3; 5, 2]
b := [2; -1]
x := A^-1*b = [7; -18]
(13 - 19)
# T/F are a waste of time
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(40)
A := [9, 7; 8, 6]
AI := [9, 7, 1, 0; 8, 6, 0, 1]
rref(AI) = [1, 0, -3, 3.5; 0, 1, 4, -4.5]
A^-1 = [-3, 3.5; 4, -4.5]
# They are equivalent
(41)
A := [1, 0, -2; -3, 1, 4; 2, -3, 4]
AI := [1, 0, -2, 1, 0, 0; -3, 1, 4, 0, 1, 0; 2, -3, 4, 0, 0, 1]
rref(AI) → [1, 0, 0, 8, 3, 1; 0, 1, 0, 10, 4, 1; 0, 0, 1, 7/2, 3/2, 1/2]
A^-1 = [8, 3, 1; 10, 4, 1; 3.5, 1.5, 0.5]
# They are equivalent
