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(1)
A := [5, 7; -3, -6]
(A^-1)^-1 → [5, 7; -3, -6]
rref(A) = [1, 0; 0, 1]
# It is invertible. It is a 2x2 matrix with 2 pivots
(2)
A := [-4, 6; 6, -9]
(A^-1)^-1 → undefined  # It is not invertible because column 1 and 2 is a multiple of 2/3
(3)
A := [5, 0, 0; -3, -7, 0; 8, 5, -1]
(A^-1)^-1 → [5, 0, 0; -3, -7, 0; 8, 5, -1]
rref(A) → [1, 0, 0; 0, 1, 0; 0, 0, 1]
# It is invertible because it is a 3x3 matrix with 3 pivots
(4)
A := [-7, 0, 4; 3, 0, -1; 2, 0, 9]
(A^-1)^-1 → undefined
rref(A) → [1, 0, 0; 0, 0, 1; 0, 0, 0]
# It is not invertible because it is a 3x3 matrix with only 2 pivots
(11 - 21)
# T/F is a waste of time
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A := [5, 2; 5, 2]
rref(A) → [1, 2/5; 0, 0]
(A^-1)^-1 → undefined
# You cannot use a row operations when the columns all are identical. it will always leave at least one column without a pivot -->  making it not invertible
# 1-4, 11-20, 23, 24
