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(1)
A := [3, 0, 4; 2, 3, 2; 0, 5, -1]
A_11 := [3, 2; 5, -1]
A_12 := [2, 2; 0, -1]
A_13 := [2, 3; 0, 5]
C_A11 := 3*|A_11| = -39
C_A12 := 0*|A_12| = 0
C_A13 := 4*|A_13| = 40
D_A := C_A11 - C_A12 + C_A13 = 1
|A| → 1
A_12 := [2, 2; 0, -1]
A_22 := [3, 4; 0, -1]
A_32 := [3, 4; 2, 2]
C_A12 := -0*|A_12| = 0
C_A22 := 3*|A_22| = -9
C_A32 := -5*|A_32| = 10
D_A := C_A12 + C_A22 + C_A32 = 1
(2)
A := [0, 4, 1; 5, -3, 0; 2, 4, 1]
C_11 := 0*det([-3, 0; 4, 1]) = 0
C_12 := -4*det([5, 0; 2, 1]) = -20
C_13 := 1*det([5, -3; 2, 4]) = 26
D_A := C_11 + C_12 + C_13 = 6
C_12 := -4*det([5, 0; 2, 1]) = -20
C_22 := -3*det([0, 1; 2, 1]) = 6
C_32 := -4*det([0, 1; 5, 0]) = 20
D_A := C_12 + C_22 + C_32 = 6
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(9)
A := [7, 6, 8, 4; 0, 0, 0, 6; 8, 7, 9, 3; 0, 4, 0, 3]
D_A := (-1)^(2 + 4)*6*det([7, 6, 8; 8, 7, 9; 0, 4, 0])
D_A := (-1)^(3 + 2)*6*4*det([7, 8; 8, 9])
det([7, 8; 8, 9]) = -1
D_A := (-1)^(3 + 2)*6*4*(-1)
D_A → 24
|A| → 24
(10)
A := [1, -2, 4, 2; 0, 0, 3, 0; 2, -4, -3, 5; 2, 0, 3, 5]
D_A := (-1)^(2 + 3)*3*det([1, -2, 2; 2, -4, 5; 2, 0, 5])
D_A := (-1)^(2 + 3)*3*(2*det([-2, 2; -4, 5]) + 5*det([1, -2; 2, -4]))
D_A = 12
|A| = 12
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# Base is 3, height is 2 area is 3*2=6
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A := [3, 1; 0, 2]
D_A := 3*2 - 1*0 → 6
A := [3, x; 0, 2]  # error: This variable is undefined. Check that the label is set correctly.
D_A := 3*2 - x*0 → 6
# Doesnt matter what x is, the area and Determinant is the same
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uv := [a, c; b, 0]  # error: This variable is undefined. Check that the label is set correctly.
uv_area := cb  # error: This variable is undefined. Check that the label is set correctly.
vu := [c, a; 0, b]  # error: This variable is undefined. Check that the label is set correctly.
uv_det := a*0 - b*c → -(b*c)
vu_det := cb - 0*a → cb
# Difference between vu and uv is that uv has a negative determinant, and vu doesnt.
# The area is equal to the one that is positive, because area cannot be negative
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A := [7, 5, 5, 9, 1; 6, 4, 5, 9, 0; 2, 1, 3, 2, 1; 9, 4, 2, 1, -1; -1, -1, 5, 2, -9]
B := [8, -5, 1, 2, -8; 5, 8, 3, 1, -2; 3, -1, -2, 4, 2; 9, 0, 2, 0, -1; 3, 9, 2, 1, 6]
|A*B| - (|A|*|B|) → 0
A := [2, 5, -5, 9; 6, 2, 5, 9; 2, 1, 7, 2; -9, 9, 2, 7]
B := [1, -5, 1, 5; 1, 2, 3, 1; 3, -1, -2, 4; 2, 0, 2, 0]
|A*B| - (|A|*|B|) → 0
A := [0, 9, -5; -6, 2, 7; 2, 1, 0]
B := [-1, 7, 2; 1, 6, -3; 3, 3, 7]
|A*B| - (|A|*|B|) → 0
# It seems like for a n*n matrix it is true that det(A*B) = det(A)*det(B)
