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(1)
[0, 5, -2; 1, -3, 6; 4, -1, 8] == -[1, -3, 6; 0, 5, -2; 4, -1, 8]  # Row A and B has been interchanged Theorem 3.b
(3)
[1, 2, 2; 0, 3, -4; 2, 7, 4] == [1, 2, 2; 0, 3, -4; 0, 3, 0]  # -2*A has been Added to row B - Theorem 3.a
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(5)
A := [1, 5, -4; -1, -4, 5; -2, -8, 7] == [1, 5, -4; 0, 1, 1; -2, -8, 7] == [1, 5, -4; 0, 1, 1; 0, 2, -1] == [1, 5, -4; 0, 1, 1; 0, 0, -3]
A_D ≠ 0
A_D := 1*1*(-3) = -3
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A := [5, 6, 6; 1, -2, -1; 2, 0, 1]
(A^-1)^-1 == A → 1
|A^-1| == 1/|A| → 1
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# 1, 3, 5, 15-20, 25, 37-42, 53
