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(1)
[1; 0; 0]
[1; 1; 0]
[1; 1; 1]
W := [1, 1, 1; 0, 1, 1; 0, 0, 1]
(W^-1)^-1 = [1, 1, 1; 0, 1, 1; 0, 0, 1]
# W has a pivot in each column --> the given set of vectors is a basis for R3
# Invertible Matrix Theorem --> linearly independent and span R3
(2)
[1; 0; 1]
[0; 0; 0]
[0; 1; 0]
W := [1, 0, 0; 0, 0, 1; 1, 0, 0]
(W^-1)^-1 =  # error: Found a singularity while evaluating this expression. You may be dividing by 0 or inverting a singular matrix.
# W has a pivot in each column --> the given set of vectors is a basis for R3
# Invertible Matrix Theorem --> NOT linearly independent
(8)
[1; -4; 3]
[0; 3; -1]
[3; -5; 4]
[0; 2; -1]
W := [1, 0, 3, 0; -4, 3, -5, 2; 3, -1, 4, -1]
(W^-1)^-1 =  # error: This matrix must be square. It must have the same number of rows and columns.
# W does not have a pivot in each column -> not a basis for R3
# Pivot in each row --> W spans R3
# Invertible Matrix Theorem -->NOT linearly independent.
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A := [1, 0, -5, 1, 4; -2, 1, 6, -2, -2; 0, 2, -8, 1, 9]
rref(A) = [1, 0, -5, 0, 7; 0, 1, -4, 0, 6; 0, 0, 0, 1, -3]
A*x == 0
x == [x_1; x_2; x_3; x_4; x_5] == x_3*[5; 4; 1; 0; 0] + x_5*[-7; -6; 0; 3; 1]
β(nul(A)) == [[5; 4; 1; 0; 0], [-7; -6; 0; 3; 1]]
# 1, 2, 8, 10, 21-27, 30-32, 33, 35, 43
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