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(1)
β := [[3; -5], [-4; 6]]
x_β := [5; 3]
[5*[3; -5], 3*[-4; 6]] → [[15; -25], [-12; 18]]
x := [15; -25] + [-12; 18] = [3; -7]
(3)
β := [[1; -8; 6], [2; -5; 7], [3; 9; -4]]
x_β := [2; -3; 0]
[2*[1; -8; 6], -3*[2; -5; 7], 0*[3; 9; -4]] → [[2; -16; 12], [-6; 15; -21], [0; 0; 0]]
x := [2; -16; 12] + [-6; 15; -21] = [-4; -1; -9]
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(5)
b_1 := [1; -3]
b_2 := [2; -5]
x := [-2; 1]
rref([1, 2, -2; -3, -5, 1]) = [1, 0, 8; 0, 1, -5]
x_β := [8; -5]
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