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(1)
v_1 := [1; 1; 0]
v_2 := [-2; 1; 3]
H == span(v_s, v_t)
# v1 and v2 vare not multiples of each other, is linearly independent and is thus a basis for H.
# Dimension of H is 2.
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(11)
A := [1, -6, 9, 0, -2; 0, 1, 2, -4, 5; 0, 0, 0, 5, 1; 0, 0, 0, 0, 0]
# 4.5: 1, 11, 17-20, 28, 30, 33, 36, 39, 43-48
