x_1 - 2*x_2 + 1*x_3 == 0
2*x_2 - 8*x_3 == 8
[1, -2, 1, 0; 0, 2, -8, 8; 5, 0, -5, 10]
5*x_1 - 5*x_3 == 10
-5*eq1
[1*(-5), -2*(-5), 1*(-5), 0; 0, 2, -8, 8; 5, 0, -5, 10] = [-5, 10, -5, 0; 0, 2, -8, 8; 5, 0, -5, 10]
eq3 + eq1
[-5, 10, -5, 0; 0, 2, -8, 8; 5 - 5, 0 + 10, -5 - 5, 10] = [-5, 10, -5, 0; 0, 2, -8, 8; 0, 10, -10, 10]
eq1*(-5)
[-5/(-5), 10/(-5), -5/(-5), 0; 0, 2, -8, 8; 0, 10, -10, 10] = [1, -2, 1, 0; 0, 2, -8, 8; 0, 10, -10, 10]
eq2*0.5
[1, -2, 1, 0; 0, 2*0.5, -8*0.5, 8*0.5; 0, 10, -10, 10] = [1, -2, 1, 0; 0, 1, -4, 4; 0, 10, -10, 10]
-10*eq2
[1, -2, 1, 0; 0*(-10), 1*(-10), -4*(-10), 4*(-10); 0, 10, -10, 10] = [1, -2, 1, 0; 0, -10, 40, -40; 0, 10, -10, 10]
eq3 == eq2 + eq3
[1, -2, 1, 0; 0, -10, 40, -40; 0, -10 + 10, 40 - 10, -40 + 10] = [1, -2, 1, 0; 0, -10, 40, -40; 0, 0, 30, -30]
eq2/(-10)
[1, -2, 1, 0; 0, -10/(-10), 40/(-10), -40/(-10); 0, 0, 30, -30] = [1, -2, 1, 0; 0, 1, -4, 4; 0, 0, 30, -30]
eq3/30
[1, -2, 1, 0; 0, 1, -4, 4; 0, 0, 30/30, -30/30] = [1, -2, 1, 0; 0, 1, -4, 4; 0, 0, 1, -1]
eq3*4
[1, -2, 1, 0; 0, 1, -4, 4; 0, 0, 1*4, -1*4] = [1, -2, 1, 0; 0, 1, -4, 4; 0, 0, 4, -4]
eq2 + eq3
[1, -2, 1, 0; 0, 1, -4 + 4, 4 + (-4); 0, 0, 4, -4] = [1, -2, 1, 0; 0, 1, 0, 0; 0, 0, 4, -4]
eq3/4
[1, -2, 1, 0; 0, 1, 0, 0; 0, 0, 4/4, -4/4] = [1, -2, 1, 0; 0, 1, 0, 0; 0, 0, 1, -1]
eq1 + eq3*(-1)
[1, -2, 1 + (1*(-1)), 0 + (-1*(-1)); 0, 1, 0, 0; 0, 0, 1, -1] = [1, -2, 0, 1; 0, 1, 0, 0; 0, 0, 1, -1]
eq1 + eq2*2
[1, -2 + (1*2), 0, 1; 0, 1, 0, 0; 0, 0, 1, -1] = [1, 0, 0, 1; 0, 1, 0, 0; 0, 0, 1, -1]
x_1 := 1
x_2 := 0
x_3 := -1
x_1 - 2*x_2 + 1*x_3 == 0 → 1
2*x_2 - 8*x_3 == 8 → 1
5*x_1 - 5*x_3 == 10 → 1
